// SBML level 2 version 1

model GMO()
  // Goldbeter1991_MinMitOscil
  // A Simple Mitotic Oscillator
  // This is a Systems Biology Markup Language (SBML) file, generated by MathSBML 2.4.6 (14-January-2005) 14-January-2005 18:33:39.806932. SBML is a form of XML, and most XML files will not display properly in an internet browser. To view the contents of an XML file use the "Page Source" or equivalent button on you browser.
  // This model originates from BioModels Database: A Database of Annotated Published Models. It is copyright (c) 2005-2009 The BioModels Team.
  // For more information see the terms of use.
  // To cite BioModels Database, please use Le Novère N., Bornstein B., Broicher A., Courtot M., Donizelli M., Dharuri H., Li L., Sauro H., Schilstra M., Shapiro B., Snoep J.L., Hucka M. (2006) BioModels Database: A Free, Centralized Database of Curated, Published, Quantitative Kinetic Models of Biochemical and Cellular Systems Nucleic Acids Res., 34: D689-D691.
  // biomodels.db:BIOMD0000000003
  // isDescribedBy pubmed:1833774
  // isHomologTo reactome:REACT_152
  // isVersionOf kegg.pathway:hsa04110 GO:0000278
  // taxonomy:8292

  // Compartments:
  compartment cell = 1 volume;  // GO:0005623

  // Species:
  species C in cell = 0.01; C is "Cyclin";  // isVersionOf interpro:IPR006670
  species M in cell = 0.01; M is "CDC-2 Kinase";  // hasVersion uniprot:P35567 uniprot:P24033
  species X in cell = 0.01; X is "Cyclin Protease";

  // Parameters:
  VM1 = 3;
  VM3 = 1;
  Kc = 0.5;

  // Assignment rules:
  V1 := C*VM1*(C + Kc)^(-1);
  V3 := M*VM3;

  // Reactions:
  creation_of_cyclin: => C; cell*vi;  // isVersionOf GO:0006412
    vi = 0.025;
  default_degradation_of_cyclin: C => ; C*cell*kd;  // isVersionOf GO:0008054
    kd = 0.01;
  reaction3: C => ; C*cell*vd*X*(C + Kd)^(-1); reaction3 is "cdc2 kinase triggered degration of cyclin";  // modifiers: X; isVersionOf GO:0008054
    vd = 0.25; Kd = 0.02;
  activation_of_cdc2_kinase: => M; cell*(1 + (-1*M))*V1*(K1 + (-1*M) + 1)^(-1);  // isVersionOf ec-code:3.1.3.16 GO:0006470 GO:0045737
    K1 = 0.005;
  deactivation_of_cdc2_kinase: M => ; cell*M*V2*(K2 + M)^(-1);  // isVersionOf ec-code:2.7.10.2 GO:0045736 GO:0006468
    V2 = 1.5; K2 = 0.005;
  activation_of_cyclin_protease: => X; cell*V3*(1 + (-1*X))*(K3 + (-1*X) + 1)^(-1);
    K3 = 0.005;
  deactivation_of_cyclin_protease: X => ; cell*V4*X*(K4 + X)^(-1);
    K4 = 0.005; V4 = 0.5;
end
